*Heading
** Job name: 25 Model name: 25
** Generated by: Abaqus/CAE 2023
*Preprint, echo=NO, model=NO, history=NO, contact=NO
**
** PARTS
**
*Part, name=Part-1
*End Part
**
**
** ASSEMBLY
**
*Assembly, name=Assembly
**
*Instance, name=Part-1-1, part=Part-1
-6.,0.,0.
*Node
      1,   6.74170351,       -0.125
      2,   6.74170351,        0.125
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*Element, type=CPS4
1, 1, 2, 4, 5
2, 5, 4, 8, 6
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*End Instance
**
*End Assembly
**
** MATERIALS
**
*Material, name=steel
*Elastic
 7.04e+06, 0.3
** ----------------------------------------------------------------
**
** STEP: Step-1
**
*Step, name=Step-1, nlgeom=NO
*Static
1., 1., 1e-05, 1.
**
** OUTPUT REQUESTS
**
*Restart, write, frequency=0
**
** FIELD OUTPUT: F-Output-1
**
*Output, field, variable=PRESELECT
**
** HISTORY OUTPUT: H-Output-1
**
*Output, history, variable=PRESELECT
*End Step
